<neuroml xmlns="http://www.neuroml.org/schema/neuroml2"  xmlns:xs="http://www.w3.org/2001/XMLSchema" xmlns:xsi="http://www.w3.org/2001/XMLSchema-instance" xsi:schemaLocation="http://www.neuroml.org/schema/neuroml2 https://raw.github.com/NeuroML/NeuroML2/development/Schemas/NeuroML2/NeuroML_v2beta4.xsd" id="CerebellarCortex">
    <include href="MossyFiber.cell.nml"></include>
    <include href="Granule_98.cell.nml"></include>
    <include href="Golgi_040408_C1.cell.nml"></include>
    <include href="MF_AMPA.synapse.nml"></include>
    <include href="AMPA_GranGol.synapse.nml"></include>
    <include href="GABAA.synapse.nml"></include>
    <include href="MFSpikeSyn.synapse.nml"></include>
    <poissonFiringSynapse id="input100Hz" synapse="MFSpikeSyn" averageRate="100 per_s" spikeTarget="./MFSpikeSyn"/>
    <network id="CerebellarCortex" type="networkWithTemperature" temperature="32.0 degC">
        <notes>Network generated using libNeuroML v0.2.11</notes>
        <population id="MossyFibers" type="populationList" component="MossyFiber" size="44">
            <instance id="0">
                <location y="79.405901051800001" x="241.688140878000013" z="8.82772833185"/>
            </instance>
            <instance id="1">
                <location y="0.222987615998" x="52.396915006100002" z="199.16492001200001"/>
            </instance>
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        </population>
        <population id="Grans" type="populationList" component="Granule_98" size="100">
            <instance id="0">
                <location y="57.183980728400002" x="127.368829446999996" z="252.805349785000004"/>
            </instance>
            <instance id="1">
                <location y="16.288624820399999" x="147.979006083999991" z="217.380941933999992"/>
            </instance>
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        </population>
        <population id="Golgis" type="populationList" component="Golgi_040408_C1" size="6">
            <instance id="0">
                <location y="33.0713082527" x="298.717124855999998" z="63.511863867000002"/>
            </instance>
            <instance id="1">
                <location y="21.740155359399999" x="49.091375510200002" z="261.525040409999974"/>
            </instance>
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        </population>
        <projection id="NetConn_MossyFibers_Grans" postsynapticPopulation="Grans" presynapticPopulation="MossyFibers" synapse="MF_AMPA">
            <connection id="0" preCellId="../MossyFibers/0/MossyFiber" postCellId="../Grans/1/Granule_98"/>
            <connection id="1" preCellId="../MossyFibers/0/MossyFiber" postCellId="../Grans/2/Granule_98"/>
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        </projection>
        <projection id="NetConn_Grans_Golgis" postsynapticPopulation="Golgis" presynapticPopulation="Grans" synapse="AMPA_GranGol">
            <connection id="3" preCellId="../Grans/0/Granule_98" postCellId="../Golgis/4/Golgi_040408_C1"/>
            <connection id="4" preCellId="../Grans/0/Granule_98" postCellId="../Golgis/5/Golgi_040408_C1"/>
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        </projection>
        <projection id="NetConn_Golgis_Grans" postsynapticPopulation="Grans" presynapticPopulation="Golgis" synapse="GABAA">
            <connection id="41" preCellId="../Golgis/0/Golgi_040408_C1" postCellId="../Grans/42/Granule_98"/>
            <connection id="45" preCellId="../Golgis/0/Golgi_040408_C1" postCellId="../Grans/46/Granule_98"/>
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        </projection>
        <inputList id="Input_0" component="input100Hz" population="MossyFibers">
            <input destination="synapses" id="0" target="../MossyFibers/0/MossyFiber"/>
            <input destination="synapses" id="1" target="../MossyFibers/1/MossyFiber"/>
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        </inputList>
    </network>
</neuroml>
