<neuroml xmlns="http://www.neuroml.org/schema/neuroml2"  xmlns:xs="http://www.w3.org/2001/XMLSchema" xmlns:xsi="http://www.w3.org/2001/XMLSchema-instance" xsi:schemaLocation="http://www.neuroml.org/schema/neuroml2 https://raw.github.com/NeuroML/NeuroML2/development/Schemas/NeuroML2/NeuroML_v2beta4.xsd" id="Cerebellum3DDemo">
    <include href="MossyFiber.cell.nml"></include>
    <include href="Granule_98.cell.nml"></include>
    <include href="Golgi_98.cell.nml"></include>
    <include href="MF_AMPA.synapse.nml"></include>
    <include href="AMPA_GranGol.synapse.nml"></include>
    <include href="GABAA.synapse.nml"></include>
    <network id="Cerebellum3DDemo" type="networkWithTemperature" temperature="32.0 degC">
        <notes>Network generated using libNeuroML v0.2.11</notes>
        <population id="MossyFibers" type="populationList" component="MossyFiber" size="40">
            <instance id="0">
                <location y="44.073259917500003" x="966.453535691999946" z="7.49147005859"/>
            </instance>
            <instance id="1">
                <location y="93.926899736400003" x="910.975962449000008" z="582.227573058999951"/>
            </instance>
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        </population>
        <population id="Grans" type="populationList" component="Granule_98" size="40">
            <instance id="0">
                <location y="58.451181056499998" x="174.689918403000007" z="301.777057798999977"/>
            </instance>
            <instance id="1">
                <location y="53.434074784099998" x="812.851394358999983" z="499.587304193000023"/>
            </instance>
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        </population>
        <population id="Golgis" type="populationList" component="Golgi_98" size="20">
            <instance id="0">
                <location y="49.941602859600003" x="162.534292622999999" z="940.048073797000029"/>
            </instance>
            <instance id="1">
                <location y="13.9938681408" x="950.182698605000041" z="532.31378363500005"/>
            </instance>
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        </population>
        <projection id="NetConn_MossyFibers_Grans" postsynapticPopulation="Grans" presynapticPopulation="MossyFibers" synapse="MF_AMPA">
            <connection id="0" preCellId="../MossyFibers/0/MossyFiber" postCellId="../Grans/1/Granule_98"/>
            <connection id="1" preCellId="../MossyFibers/0/MossyFiber" postCellId="../Grans/2/Granule_98"/>
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        </projection>
        <projection id="NetConn_Grans_Golgis" postsynapticPopulation="Golgis" presynapticPopulation="Grans" synapse="AMPA_GranGol">
            <connection id="2" preCellId="../Grans/0/Granule_98" postCellId="../Golgis/3/Golgi_98"/>
            <connection id="4" preCellId="../Grans/0/Granule_98" postCellId="../Golgis/5/Golgi_98"/>
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        </projection>
        <projection id="NetConn_Golgis_Grans" postsynapticPopulation="Grans" presynapticPopulation="Golgis" synapse="GABAA">
            <connection id="3" preCellId="../Golgis/0/Golgi_98" postCellId="../Grans/4/Granule_98"/>
            <connection id="13" preCellId="../Golgis/0/Golgi_98" postCellId="../Grans/14/Granule_98"/>
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        </projection>
    </network>
</neuroml>
